<?xml version="1.0"?>
<!--
  File:     nk-8-2u.xml
  Author:   Yurik V. Nikiforoff, and Aero-Matic v 0.8

  All engine parameters takes from "Practical Aerodynamics of Tu-154B", Ligum T.I., Transport, 1985, Moscow


  Inputs:
    name:           nk-8-2u
    type:           turbine
    thrust:         23599.75 lb
    augmented?      no
    injected?       no
-->

<turbine_engine name="nk-8-2u">
  <milthrust> 24724 </milthrust><!-- with fuel threshold - 23600 lbs (105 KN) -->
  <bypassratio>    6.0 </bypassratio><!-- Only for dynamic reason; real ratio is 1:1 -->
  <tsfc>           0.67 </tsfc><!-- 0.058 kg/(N*h) for milthrust (105 KN, 18042 pph) -->
  <bleed>           0.05</bleed>
  <idlen1>         30.0 </idlen1>
  <idlen2>         55.4 </idlen2>
  <maxn1>         101.0 </maxn1>
  <maxn2>         96.5 </maxn2>
  <augmented>         0 </augmented>
  <injected>          0 </injected>

  <function name="IdleThrust">
    <table>
      <independentVar lookup="row">velocities/mach</independentVar>
      <independentVar lookup="column">atmosphere/density-altitude</independentVar>
      <tableData>
        -10000     0       13100    26200      32800      36100         39400
  0     0.102      0.062   0.067    0.095      0.11       0.13          0.14
  0.3   0.061      0.038   0.028    0.048      0.07       0.083         0.1
  0.5   0.015      0.01    0.005    0.011      0.038      0.054         0.07
  0.88  0          0       0        0          0          0             0.01
  1     0          0       0        0          0          0             0
      </tableData>
    </table>
  </function>

  <function name="MilThrust">
     <table>
      <independentVar lookup="row">velocities/mach</independentVar>
      <independentVar lookup="column">atmosphere/density-altitude</independentVar>
      <tableData>
      -10000    0     4000   13100    26200    32800     36100    39400
  0     1.65     1.0   0.8    0.75     0.583    0.504     0.462    0.33
  0.3   1.16     0.81  0.7    0.66     0.539    0.48      0.434    0.33
  0.5   0.94     0.73  0.65   0.6      0.506    0.468     0.412    0.31
  0.88  0.7      0.62  0.59   0.56     0.473    0.456     0.408    0.31
  1     0.65     0.6   0.58   0.57     0.495    0.468     0.408    0.31
      </tableData>
    </table>
  </function>


</turbine_engine>
