<?xml version="1.0"?>
<!--

    Author:   Yurik V. Nikiforoff, yurik@megasignal.com
    Date:     apr-nov 2008
    Function: Autopilot fot TU-154B
    License:  GPL
    -->
<autopilot name="ABSU-154">

<!-- INTERFACE PROPERTIES -->

<!-- Roll interface properties -->

<property value="0.001"> ap/alt-gain </property>

<!--<property> fcs/revers-by-joy </property>-->
<property value="0.0"> fcs/revers-by-key </property>
<property value="0.0"> ap/turbulence </property>
<!--<property value="0.1"> fcs/revers-1-limit </property>
<property value="0.03"> fcs/revers-2-limit </property>-->

<!--<property> fcs/revers-1-limit </property>
<property> fcs/revers-2-limit </property>-->

  <property>ap/roll-selector</property>
  <property>ap/input-heading-pnp</property>
  <property>ap/input-heading-zk</property>
  <property>ap/input-at</property>

  <property>ap/suu-enable</property>

<!--  <property>ap/gs-distance</property>
  <property>ap/crosstrack-m</property> -->

  <property>ap/ils-epsilon</property>

  <property>ap/at-pid-output</property>
  <property>ap/at-podg</property>
  <property>ap/at-hold-0</property>
  <property>ap/at-hold-1</property>
  <property>ap/at-hold-2</property>

  <property>ap/input-heading-delta</property>
  <property>ap/heading-cmd-norm</property>


  <property>ap/stab-input-roll-rad</property>
  <property>ap/roll-hold</property>

<!-- Pitch interface properties -->
  <property>ap/pitch-selector</property>

<!--<property>ap/gs-gain</property>-->
<property>ap/hdg-out</property>
<property>ap/output-pitch-current</property>

  <property>ap/input-glideslope-speed</property>
  <property>ap/input-glideslope-delta</property>

  <property>ap/glideslope-cmd-norm</property>


  <property>ap/input-mach</property>
  <property>ap/mach-cmd-norm</property>


  <property>ap/input-speed</property>
  <property>ap/speed-cmd-norm</property>


  <property>ap/input-altitude</property>
  <property>ap/altitude-cmd-norm</property>


  <property>ap/stab-input-pitch-rad</property>
  <property>ap/offset-pitch-rad</property>


  <property>ap/pitch-hold</property>
  <property>ap/pitch/latch-out-rad</property>


  <property>ap/windup-trigger</property>

<property>ap/pitch/met-integr-out</property>
 <!--Needles flag-->
  <property>ap/ena-needles</property>

							<!--RESTORE IT FOR RELEASE!!!-->


<channel name="Glue">

<fcs_function name="ap/navigac" >
    <function>
       <property>/tu154/switches/pn-5-navigac</property>
    </function>
  </fcs_function>

<fcs_function name="ap/posadk" >
    <function>
       <property>/tu154/switches/pn-5-posadk</property>
    </function>
</fcs_function>

<fcs_function name="ap/indicated-altitude-ft" >
     <function>
        <property>/instrumentation/altimeter[0]/pressure-alt-ft</property>
     </function>
</fcs_function>

<fcs_function name="ap/heading-epsilon" >
     <function>
        <property>/instrumentation/nav[0]/heading-needle-deflection-norm</property>
     </function>
</fcs_function>

<fcs_function name="ap/gs-epsilon" >
     <function>
        <property>/instrumentation/nav[0]/gs-needle-deflection-norm</property>
     </function>
</fcs_function>

</channel>

							<!--COMMENT IT FOR RELEASE!!!-->

<!--ILS and VOR debug channel-->
<!--
<channel name="Debug">

 <waypoint_heading name="debug/wp-heading" unit="DEG">
   <source_latitude unit="DEG">debug/wp-lat-deg</source_latitude>
   <source_longitude unit="DEG">debug/wp-lon-deg</source_longitude>
   <target_latitude unit="RAD">position/lat-gc-rad</target_latitude>
   <target_longitude unit="RAD">position/long-gc-rad</target_longitude>
 </waypoint_heading>

 <waypoint_distance name="debug/wp-distance" unit="M">
   <source_latitude unit="DEG">debug/wp-lat-deg</source_latitude>
   <source_longitude unit="DEG">debug/wp-lon-deg</source_longitude>
   <target_latitude unit="RAD">position/lat-gc-rad</target_latitude>
   <target_longitude unit="RAD">position/long-gc-rad</target_longitude>
 </waypoint_distance>

 <summer name="debug/wp-hdg">
   <input>debug/wp-heading</input>
   <bias>-270.0</bias>
 </summer>

 <pure_gain name="debug/h-m">
   <input>position/h-agl-ft</input>
   <gain>0.3048</gain>
 </pure_gain>

 <fcs_function name="debug/gs-epsilon">
   <function>
     <product>
      <value>-1.43</value>
      <sum>
	<value>-2.4</value>
	<product>
	  <value>57.3</value>
	  <atan2>
	    <property>debug/h-m</property>
	    <property>debug/wp-distance</property>
	  </atan2>
      </product>
      </sum>
    </product>
   </function>
   <clipto>
    <min>-1.0</min>
    <max>1.0</max>
   </clipto>
 </fcs_function>

 <pure_gain name="debug/wp-hdg-corrected">
   <input>debug/wp-hdg</input>
   <gain>0.77</gain>
   <clipto>
    <min>-1.0</min>
    <max>1.0</max>
   </clipto>
 </pure_gain>

</channel>
-->

<!--
==================================== NEW PITCH CHANNEL ====================================
modified by Yurik nov 2013
 Based on:
 ABSU-154-2 RTE part 1 022.01.00 p.31
 ABSU-154-2 RTE part 2 022.10.00 p.34
 -->

<channel name="Pitch stab">

<!-- Glideslope path system -->
  <switch name="ap/pitch/gs-epsilon-gain">
    <default value="-3.0"/>
    <test value="-2.0">
      instrumentation/indicated-altitude-m lt 250.0
    </test>
  </switch>

  <pure_gain name="ap/pitch/gs-epsilon">
<input>ap/gs-epsilon</input>	<!-- -1..1 --> <!--RESTORE IT FOR RELEASE!!!-->
<!--<input>debug/gs-epsilon</input>-->			    <!--COMMENT IT FOR RELEASE!!!-->
    <gain>ap/pitch/gs-epsilon-gain</gain>
  </pure_gain>

  <pure_gain name="ap/pitch/gs-k7">
    <input>ap/pitch/gs-epsilon</input>
    <gain>0.5</gain>
  </pure_gain>

  <pure_gain name="ap/pitch/gs-gain-k2">
    <input>ap/pitch/gs-epsilon</input>
    <gain>0.7</gain>
  </pure_gain>

  <washout_filter name="ap/pitch/gs-k2">
  <input>ap/pitch/gs-gain-k2</input>
  <c1>0.3</c1>
  </washout_filter>

  <summer name="ap/pitch/gs-attitude">
    <input>attitude/theta-rad</input>
    <bias>-0.0087</bias>	<!--0.5 deg-->
  </summer>

  <pure_gain name="ap/pitch/gs-gain-k11">
    <input>ap/pitch/gs-attitude</input>
    <gain>5.0</gain>
  </pure_gain>

  <washout_filter name="ap/pitch/gs-k11">
    <input>ap/pitch/gs-gain-k11</input>
    <c1>0.3</c1>
  </washout_filter>

  <summer name="ap/pitch/gs-sum-internal">
    <input>ap/pitch/gs-k7</input>
    <input>ap/pitch/gs-k2</input>
    <input>ap/pitch/gs-k11</input>
  </summer>

  <pure_gain name="ap/pitch/gs-k10">
    <input>ap/pitch/gs-attitude</input>
    <gain>0.3</gain>
  </pure_gain>

  <lag_filter name="ap/pitch/gs-k4">
    <input>ap/pitch/gs-sum-internal</input>
    <c1>4.0</c1>
  </lag_filter>

  <lag_filter name="ap/pitch/gs-k8">
    <input>ap/pitch/gs-k10</input>
    <c1>4.0</c1>
  </lag_filter>

  <switch name="ap/pitch/gs-k8-switched">
    <default value="0.0"/>
    <test value="ap/pitch/gs-k8">
      ap/pitch-hold == 1
    </test>
  </switch>

  <summer name="ap/pitch/gs-sum-out">
    <input>ap/pitch/gs-k4</input>
    <input>ap/pitch/gs-k8-switched</input>
  </summer>

  <switch name="ap/pitch/gs-sum-out-switched">
    <default value="0.0"/>
    <test value="ap/pitch/gs-sum-out">
      ap/posadk == 1
    </test>
  </switch>

  <pure_gain name="ap/pitch/gs-k5">
    <input>ap/pitch/gs-sum-out-switched</input>
    <gain>5.0</gain>
    <clipto>
      <min>-0.6</min>
      <max>0.6</max>
    </clipto>
  </pure_gain>

  <pure_gain name="ap/pitch/gs-needle">
    <input>ap/pitch/gs-sum-out-switched</input>
    <gain>-0.5</gain>
    <clipto>
      <min>-1.0</min>
      <max>1.0</max>
    </clipto>
  </pure_gain>


<!--M stab-->
  <summer name="ap/pitch/mach-error">
    <input>ap/input-mach</input>
    <input>-velocities/mach</input>
    <clipto>
      <min>-0.5</min>
      <max>0.5</max>
    </clipto>
  </summer>

  <switch name="ap/pitch/mach-windup">
    <default value="-1.0"/>
    <test value="0.0">
      ap/pitch-selector == 4
      ap/pitch-hold == 1
    </test>
  </switch>

  <pid name="ap/pitch/m-pid">
    <input>ap/pitch/mach-error</input>
    <kp> 5.0 </kp>
    <ki> 0.5 </ki>
    <kd> 5.0 </kd>
    <trigger>ap/pitch/mach-windup</trigger>
    <clipto>
      <min>-0.25</min>
      <max>0.25</max>
    </clipto>
  </pid>

<!--End M stab-->

<!--V stab-->
  <summer name="ap/pitch/speed-error">
    <input>ap/input-speed</input>
    <input>-velocities/vc-fps</input>
    <clipto>
      <min>-100</min>
      <max>100</max>
    </clipto>
  </summer>

  <switch name="ap/pitch/speed-windup">
    <default value="-1.0"/>
    <test value="0.0">
      ap/pitch-selector == 3
      ap/pitch-hold == 1
    </test>
  </switch>

  <pid name="ap/pitch/v-pid">
    <input>ap/pitch/speed-error</input>
    <kp> 0.01 </kp>
    <ki> 0.001 </ki>
    <kd> 0.01 </kd>
    <trigger>ap/pitch/speed-windup</trigger>
    <clipto>
      <min>-0.3</min>
      <max>0.3</max>
    </clipto>
  </pid>

<!--End V stab-->
<!--H stab-->
  <summer name="ap/pitch/pressure-delta-ft">
    <input>position/h-sl-ft</input>
    <input>-ap/indicated-altitude-ft</input>
  </summer>

  <switch name="ap/pitch/pressure-delta-ft-switched">
    <default value="0.0"/>
    <test value="ap/pitch/pressure-delta-ft">
      ap/pitch-selector == 2
    </test>
  </switch>

  <lag_filter name="ap/pitch/pressure-delta-ft-filtered">
    <input>ap/pitch/pressure-delta-ft-switched</input>
    <c1>0.017</c1>	<!--1 min tau-->
  </lag_filter>

  <summer name="ap/pitch/altitude-error">
    <input>ap/input-altitude</input>
    <input>ap/pitch/pressure-delta-ft-filtered</input>	<!--RESTORE IT FOR RELEASE!!!-->
    <input>-position/h-sl-ft</input>
    <clipto>
      <min>-100</min>
      <max>100</max>
    </clipto>
  </summer>
<!--
  <switch name="ap/pitch/h-err-switched">
    <default value="0.0"/>
    <test value="-ap/pitch/altitude-error">
      ap/pitch-selector == 2
      ap/pitch-hold == 1
    </test>
  </switch>
  -->
  <switch name="ap/pitch/h-windup">
    <default value="-1.0"/>
    <test value="0.0">
      ap/pitch-selector == 2
      ap/pitch-hold == 1
    </test>
  </switch>

  <pid name="ap/pitch/h-pid-pi">
    <input>-ap/pitch/altitude-error</input>
    <kp> 0.0005 </kp>
    <ki> 0.00005 </ki>
    <kd> 0.0 </kd>
    <trigger>ap/pitch/h-windup</trigger>
  </pid>

  <pid name="ap/pitch/h-pid-d">
    <input>-ap/pitch/altitude-error</input>
    <kp> 0.0 </kp>
    <ki> 0.0 </ki>
    <kd> 0.0005 </kd>
  </pid>

  <switch name="ap/pitch/h-pid-d-switched">
    <default value="ap/pitch/h-pid-d"/>
    <test value="0.0">
      ap/turbulence == 1
    </test>
  </switch>

  <summer name="ap/pitch/h-pid">
    <input>ap/pitch/h-pid-pi</input>
    <input>ap/pitch/h-pid-d</input>
  </summer>

<!--End H stab-->

<!--Go around stab-->
  <fcs_function name="ap/pitch/go-around-speed">
  <function>
    <table >
      <independentVar> fcs/flap-pos-deg </independentVar>
      <tableData>
	0         367
	28        317
	45        267
      </tableData>
    </table>
  </function>
  </fcs_function>

  <fcs_function name="ap/pitch/go-around-pitch-rad">
  <function>
    <table >
      <independentVar> fcs/flap-pos-deg </independentVar>
      <tableData>
	0         0.8
	28        0.4
	45        0.2
      </tableData>
    </table>
  </function>
  </fcs_function>

  <switch name="ap/pitch/go-around-pitch-rad-switched">
    <default value="0.0"/>
    <test value="ap/pitch/go-around-pitch-rad">
      ap/pitch-selector == 6
    </test>
  </switch>

  <washout_filter name="ap/pitch/go-around-pitch-rad-dot">
    <input>ap/pitch/go-around-pitch-rad-switched</input>
    <c1>0.1</c1>
  </washout_filter>

  <summer name="ap/pitch/go-around-f5">
    <input>ap/pitch/go-around-speed</input>
    <input>-velocities/vc-fps</input>
    <clipto>
      <min>-82</min>
      <max>82</max>	<!-- +-25 m/s -->
    </clipto>
  </summer>

  <pure_gain name="ap/pitch/go-around-kv">
    <input>ap/pitch/go-around-f5</input>
    <gain>0.005</gain>
  </pure_gain>

  <pure_gain name="ap/pitch/go-around-kd">
    <input>-velocities/vc-fps</input>
    <gain>0.005</gain>
  </pure_gain>

  <washout_filter name="ap/pitch/go-around-d">
    <input>ap/pitch/go-around-kd</input>
    <c1>0.3</c1>
  </washout_filter>

  <summer name="ap/pitch/go-around-sum-1">
    <input>ap/pitch/go-around-kv</input>
    <input>ap/pitch/go-around-d</input>
  </summer>

  <lag_filter name="ap/pitch/go-around-sum-1-filtered">
    <input>ap/pitch/go-around-sum-1</input>
    <c1>2.0</c1>
  </lag_filter>

  <washout_filter name="ap/pitch/go-around-theta-rad-dot">
    <input>attitude/theta-rad</input>
    <c1>0.1</c1>
  </washout_filter>

  <summer name="ap/pitch/go-around-sum-2">
    <input>ap/pitch/go-around-sum-1-filtered</input>
    <input>-ap/pitch/go-around-pitch-rad-dot</input>
    <input>ap/pitch/go-around-theta-rad-dot</input>
  </summer>

  <pure_gain name="ap/pitch/go-around-f">
    <input>ap/pitch/go-around-sum-2</input>
    <gain>5.0</gain>
  </pure_gain>


<!--End go around stab-->


<!--Longitudal stabilizer selector-->

  <switch name="ap/pitch/stab-selector">
    <default value="0.0"/>	 <!--	Zero output -->
    <test value="ap/pitch/h-pid"><!--	Stab H -->
      ap/pitch-selector == 2
    </test>
    <test value="ap/pitch/v-pid"><!--	Stab V -->
      ap/pitch-selector == 3
    </test>
    <test value="ap/pitch/m-pid"><!--	Stab M -->
      ap/pitch-selector == 4
    </test>
  </switch>


<!--Theta stabilizer-->
  <switch name="ap/pitch/theta-latched-rad">
    <default value="ap/pitch/latch-out-rad"/>
    <test value="ap/pitch/theta-latched-rad">
      ap/pitch-selector ne 0
    </test>
  </switch>

  <summer name="ap/pitch/theta-sum-rad">
    <input>-ap/pitch/theta-latched-rad</input> <!--This method of latching of current pitch not work with old nasal code-->
    <!--<input>-ap/offset-pitch-rad</input>-->
    <input>attitude/theta-rad</input>
  </summer>

  <pure_gain name="ap/pitch/theta">
    <input>ap/pitch/theta-sum-rad</input>
    <gain>1.0</gain>
  </pure_gain>

<!--Bank compensator-->
 <fcs_function name="ap/pitch/bank-compensation">
    <function>
      <product>
	<abs>
	  <property>attitude/phi-rad</property>
	</abs>
	<value>-0.015</value>
      </product>
    </function>
 </fcs_function>

<!--Pitch manually-->
  <pure_gain name="ap/pitch/manu">
    <input>-ap/stab-input-pitch-rad</input>
    <gain>1.0</gain>
    <clipto>
      <min>-0.3</min>	<!-- Limit +-17 deg -->
      <max>0.3</max>
    </clipto>
  </pure_gain>

<!--Main pitch summer-->
  <summer name="ap/pitch/main_stab_summer">
    <input>ap/pitch/theta</input>
    <input>ap/pitch/bank-compensation</input>
    <input>ap/pitch/manu</input>
    <input>ap/pitch/stab-selector</input>
<!--    <clipto>
      <min>-1.0</min>
      <max>1.0</max>
    </clipto>	      -->
  </summer>


  <summer name="ap/pitch/latch_stab_summer">
    <input>attitude/theta-rad</input>
    <input>ap/pitch/bank-compensation</input>
    <input>ap/pitch/manu</input>
    <input>ap/pitch/stab-selector</input>
    <output>ap/pitch/latch-out-rad</output>
  </summer>


  <pure_gain name="ap/pitch/main_stab">
    <input>ap/pitch/main_stab_summer</input>
    <gain>5.0</gain>
  </pure_gain>

  <!--AP mode selector-->
  <switch name="ap/pitch/ap-sw">
    <default value="0.0"/>
    <test value="ap/pitch/main_stab">
      ap/pitch-selector == 1			<!--Stab-->
    </test>
    <test value="ap/pitch/main_stab">		<!--H-->
      ap/pitch-selector == 2
    </test>
    <test value="ap/pitch/main_stab">		<!--V-->
      ap/pitch-selector == 3
    </test>
    <test value="ap/pitch/main_stab">		<!--M-->
      ap/pitch-selector == 4
    </test>
    <test value="ap/pitch/gs-k5">		<!--Glideslope-->
      ap/pitch-selector == 5
    </test>
    <test value="ap/pitch/go-around-f">		<!--Go around-->
      ap/pitch-selector == 6
    </test>
  </switch>

  <switch name="ap/pitch/ap-selector">
    <default value="0.0"/>
    <test value="ap/pitch/ap-sw">
      ap/pitch-hold == 1			<!--Main hold switch-->
    </test>
  </switch>
<!-- ********************** MET section ************************** -->
	    <!--MET selector-->
	    <switch name="ap/pitch/met-selector">
	      <default value="ap/pitch/ap-selector"/>
	      <test logic="OR" value="fcs/met-cmd">
		ap/pitch-selector == 0
		ap/pitch-hold == 0	<!--We use buttons for MET moving if yoke control mode (0) selected-->
	      </test>
	    </switch>

	    <!--Input MET threshold (deadband zone)-->
	    <deadband name="ap/pitch/met-input-deadband">
	      <input>ap/pitch/met-selector</input>
	      <width>0.2</width>
	    </deadband>

	    <!--Limit for output MET value-->
	    <deadband name="ap/pitch/met-output-deadband">
	      <input>ap/pitch/met-integr-out</input>
	      <width>2.0</width> <!-- -1 ... 1 -->
	    </deadband>

	    <switch name="ap/pitch/met-threshold">
              <default value="0.0"/>
	      <test value="0.0625">	<!--1/16 sec -> 32 sec for moving MET to all band -1..1 -->
                ap/pitch/met-input-deadband ne 0
		ap/pitch/met-selector ge 0
              </test>
              <test value="-0.0625">
                ap/pitch/met-input-deadband ne 0
		ap/pitch/met-selector lt 0
              </test>
            </switch>

	    <switch name="ap/pitch/met-input">
              <default value="ap/pitch/met-threshold"/>
              <test value="0.0">
                ap/pitch/met-output-deadband ne 0
		ap/pitch/met-integr-out le 0
		ap/pitch/met-threshold le 0
              </test>
              <test value="0.0">
                ap/pitch/met-output-deadband ne 0
		ap/pitch/met-integr-out gt 0
		ap/pitch/met-threshold gt 0
              </test>
            </switch>

	    <integrator name="ap/pitch/met-integrator">
              <input>ap/pitch/met-input</input>
	      <c1>1.0</c1>
	      <!--<trigger>instrumentation/nvu/stopped</trigger>-->
		<output>ap/pitch/met-integr-out</output>
            </integrator>

	    <pure_gain name="ap/pitch/met">
	      <input>ap/pitch/met-integrator</input>
	      <gain>0.7</gain>
	    </pure_gain>

<!-- ***************** End MET section ****************************-->

<!-- +++++++++++++++++++ SUU ( enchance control system ) ++++++++++++++++++ -->
<!--
There is a system for enchance pitch control. It read pitch trimmer position and adjust gain of pitch channel of yoke control.
-->
            <scheduled_gain name="ap/suu">
              <input>fcs/elevator-cmd-norm</input>
              <table>
                <!--<independentVar> fcs/pitch-trim-cmd-norm </independentVar>-->
		<independentVar> ap/pitch/met-integrator </independentVar>
                <tableData>
                  -1            -1.2
                  0		-0.175
		  0.5           0.325
		  0.583         0.4
		  0.667         0.4
		  1             0.4
                </tableData>
              </table>
            </scheduled_gain>

            <switch name="ap/suu-switched">
              <default value="0.0"/>
              <test value="ap/suu">
                ap/suu-enable == 1
              </test>
            </switch>

	    <pure_gain name="ap/suu-gain">
	      <input>ap/suu-switched</input>
	      <gain>-0.5</gain>
	    </pure_gain>
<!--
            <summer name="ap/pitch-suu">
	     <input>ap/pitch-inverted</input>
             <input>ap/suu-switched</input>
              <clipto>
                <min>-1</min>
                <max>1</max>
              </clipto>
            </summer>-->

<!-- +++++++++++++++++++ END SUU subsystem  ++++++++++++++++++ -->


<!--Pitch damper-->
  <pure_gain name="ap/pitch/kwz-main">
    <input>velocities/thetadot-rad_sec</input>
    <gain>4.0</gain>
  </pure_gain>

  <pure_gain name="ap/pitch/kwz-gs">
    <input>velocities/thetadot-rad_sec</input>
    <gain>4.0</gain>
  </pure_gain>

  <switch name="ap/pitch/kwz-gs-switched">
    <default value="0.0"/>
    <test value="ap/pitch/kwz-gs">
      ap/pitch-selector == 5		<!--Glideslope-->
      ap/pitch-hold == 1
    </test>
    <test value="ap/pitch/kwz-gs">
      ap/pitch-selector == 6		<!--Go around-->
      ap/pitch-hold == 1
    </test>
  </switch>

<!--End pitch damper  -->

  <summer name="ap/pitch/ap-summer">
    <input>ap/pitch/kwz-main</input>
    <input>ap/pitch/kwz-gs-switched</input>
    <input>ap/pitch/ap-selector</input>
    <input>ap/suu-gain</input>
    <clipto>
      <min>-0.6</min>
      <max>0.6</max>
    </clipto>
  </summer>


  <pure_gain name="ap/pitch/elevator-cmd">
    <input>ap/pitch/ap-summer</input>
    <gain>systems/electrical-ok</gain>
    <output>fcs/absu-pitch</output>
  </pure_gain>

</channel>
<!--================================= END NEW PITCH CHANNEL ===================================-->

<!-- *********************** Heading channels ************************ -->

      <channel name="Heading stab">
<!--
        <pure_gain name="ap/heading-true-deg">
         <input>attitude/heading-true-rad</input>
         <gain>57.3</gain>
        </pure_gain>

        <summer name="ap/heading-fork">
          <input> ap/heading-true-deg </input>
          <input> -instrumentation/tks-heading </input>
        </summer>-->

<!--******************************* VOR Staff ***************************-->
        <summer name="ap/heading-error-pnp">
          <input> -instrumentation/pnp-heading </input>
          <input> ap/input-heading-pnp </input>
          <input> -instrumentation/nvu/drift-angle </input>
        </summer>
<!--
        <switch name="ap/heading-error-vor">
          <default value="ap/heading-error-auto"/>
          <test value="ap/heading-error-pnp">
            ap/delta-deadband ne 0
          </test>
        </switch>
        -->
<!--
        <pure_gain name="ap/vor-hdg">
          <input> ap/hdg-out </input>
          <gain> 0.05 </gain>
        </pure_gain>-->

<!--VOR angle stabilizer (epsilon) -->
        <pure_gain name="ap/vor-beam-error">
<!--<input> debug/deviation-deg</input>-->
         <input> -ap/input-heading-delta </input>
         <gain> 2.0 </gain><!--1-->
         <clipto>
           <min> -5 </min>
           <max>  5 </max>
         </clipto>
        </pure_gain>

        <lag_filter name="ap/beam-error-filtered">
          <input>ap/vor-beam-error</input>
         <c1>5.0</c1>
        </lag_filter>

        <pure_gain name="ap/beam-error-adjusted">
          <input> ap/beam-error-filtered </input>
          <gain> 7.0 </gain>
        </pure_gain>

        <switch name="ap/vor-eps">
          <default value="0.0"/>
          <test value="ap/beam-error-adjusted">
            ap/roll-selector eq 3
	    ap/navigac == 1
          </test>
        </switch>

        <!--******************************* ZK Staff ***************************-->
        <summer name="ap/heading-error-zk">
<!--<input> -attitude/psi-deg </input>-->			<!--COMMENT IT FOR RELEASE!!!-->
<input> -instrumentation/pnp-heading </input>    <!--RESTORE IT FOR RELEASE!!!-->
          <input> ap/input-heading-zk </input>
        </summer>
        <!--******************************* NVU Staff ***************************-->
        <pure_gain name="ap/nvu-delta-corr">
          <input> instrumentation/nvu/Z-active </input>
          <gain> 0.01 </gain>
          <clipto>
            <min> -60 </min>
            <max>  60 </max>
          </clipto>
        </pure_gain>

        <summer name="ap/heading-error-nvu">
          <input> -instrumentation/tks-heading </input>
          <input> instrumentation/nvu/ZPU-active </input>
          <input> -ap/nvu-delta-corr </input>
          <input> -instrumentation/nvu/drift-angle </input>
        </summer>

<!--******************************* ILS Staff ***************************-->
        <summer name="ap/heading-error-ils">
<input> -attitude/psi-deg </input>					<!--COMMENT IT FOR RELEASE!!!-->
<!--<input> -instrumentation/pnp-heading </input>-->		<!--RESTORE IT FOR RELEASE!!!-->
          <input> ap/input-heading-pnp </input>
        </summer>

        <switch name="ap/ils-error-bias-switch">
          <default value="0.0"/>
          <test value="360.0">
            ap/heading-error-ils lt -180
          </test>
          <test value="-360.0">
            ap/heading-error-ils gt 180
          </test>
        </switch>

        <switch name="ap/ils-beam-ki">
          <default value="0.003"/><!--0.003-->
          <test value="0.007"><!--0.007-->
            instrumentation/indicated-altitude-m lt 250.0
          </test>
        </switch>

        <pure_gain name="ap/ils-epsilon-input">
<!--<input> debug/wp-hdg-corrected</input>-->				<!--COMMENT IT FOR RELEASE!!!-->
<input> ap/heading-epsilon </input><!-- -1...1 -->	<!--RESTORE IT FOR RELEASE!!!-->
          <gain> 3.0 </gain>
        </pure_gain>


        <pure_gain name="ap/ils-hdg-k10">
	  <input> ap/ils-epsilon-input</input>
          <gain> 1.0 </gain>
        </pure_gain>

        <pure_gain name="ap/ils-gain-k17">
	  <input> ap/ils-epsilon-input</input>
          <gain> 10.0 </gain>
        </pure_gain>

<!--        <lag_filter name="ap/ils-beam-filtered">
          <input>ap/ils-beam-error</input>
          <c1>5.0</c1>
        </lag_filter> -->


 <!-- ILS heading  -->
<!-- modified by Yurik jul 2013
 Based on:
 ABSU-154-2 RTE part 1 022.01.00 p.24-->
        <summer name="ap/ils-hdg-deviation">
          <input> ap/ils-error-bias-switch </input>
          <input> ap/heading-error-ils </input>
        </summer>

        <pure_gain name="ap/ils-hdg-gain-k2">
	  <input> ap/ils-hdg-mainsummer </input>
          <gain> 0.2 </gain><!--0.2-->
        </pure_gain>

        <switch name="ap/ils-hdg-gain-k2-switched">
          <default value="0.0"/>
          <test value="ap/ils-hdg-gain-k2">
            instrumentation/indicated-altitude-m lt 250.0
          </test>
        </switch>

        <pure_gain name="ap/ils-hdg-k3">
	  <input> ap/ils-hdg-deviation </input>
          <gain> -0.7 </gain>
        </pure_gain>

        <switch name="ap/ils-hdg-k3-switched">
          <default value="0.0"/>
          <test value="ap/ils-hdg-k3">
            instrumentation/indicated-altitude-m gt 250.0
          </test>
        </switch>

        <lag_filter name="ap/ils-hdg-k4">
          <input>ap/ils-hdg-gain-k2-switched</input>
          <c1>1.0</c1>
        </lag_filter>

        <pure_gain name="ap/ils-hdg-gain-k5">
	  <input> ap/ils-hdg-deviation </input>
          <gain> 0.175 </gain>
        </pure_gain>

        <pure_gain name="ap/ils-hdg-k6">
	  <input> ap/ils-hdg-deviation </input>
          <gain> 0.7 </gain>
        </pure_gain>

        <switch name="ap/ils-hdg-k6-switched">
          <default value="0.0"/>
          <test value="ap/ils-hdg-k6">
            instrumentation/indicated-altitude-m gt 250.0
          </test>
        </switch>

        <washout_filter name="ap/ils-hdg-k5">
	  <input> ap/ils-hdg-gain-k5</input>
          <c1>0.3</c1>
        </washout_filter>

        <washout_filter name="ap/ils-hdg-k17">
	  <input> ap/ils-gain-k17</input>
          <c1>0.3</c1>
        </washout_filter>

        <summer name="ap/ils-hdg-f1">
         <input> ap/ils-hdg-k3-switched </input>
	 <input> ap/ils-hdg-k10 </input>
	 <input> ap/ils-hdg-k4 </input>
         <clipto>
           <min> -20.0 </min>
           <max> 20.0 </max>
         </clipto>
        </summer>


        <summer name="ap/ils-hdg-mainsummer">
         <input> ap/ils-hdg-k6-switched </input>
	 <input> ap/ils-hdg-f1 </input>
	 <input> ap/ils-hdg-k5 </input>
	 <input> ap/ils-hdg-k17 </input>
<!--         <clipto>
           <min> -0.38 </min>
           <max> 0.38 </max>
         </clipto>-->
        </summer>

        <pure_gain name="ap/ils-out">
	  <input> ap/ils-hdg-mainsummer </input>
          <gain> 0.043 </gain>
        </pure_gain>


<!-- ############################## Needles ############################## -->
        <pure_gain name="ap/heading-needle-deflection-ils">
          <!--<input> ap/ils-angle-deviation </input>-->
	  <input> ap/heading-epsilon </input>
          <gain>1.0</gain><!--0.143-->
          <clipto>
            <min> -1 </min>
            <max>  1 </max>
          </clipto>
        </pure_gain>

        <pure_gain name="ap/heading-needle-deflection-vor">
          <input> -ap/input-heading-delta </input>
          <gain>0.02</gain>
          <clipto>
            <min> -1 </min>
            <max>  1 </max>
          </clipto>
        </pure_gain>

        <pure_gain name="ap/heading-needle-deflection-nvu">
          <input> -instrumentation/nvu/Z-active </input>
          <gain>0.0002</gain>
          <clipto>
            <min> -1 </min>
            <max>  1 </max>
          </clipto>
        </pure_gain>

        <switch name="ap/heading-needle-deflection">
          <default value="0.0"/>
          <test value="ap/heading-needle-deflection-vor">
            ap/roll-selector eq 3
	    ap/posadk eq 0
          </test>
          <test value="ap/heading-needle-deflection-nvu">
            ap/roll-selector eq 4
	    ap/posadk eq 0
          </test>
          <test value="ap/heading-needle-deflection-ils">
	    <!--ap/roll-selector eq 5-->
	    ap/posadk eq 1
          </test>
        </switch>

        <pure_gain name="ap/gs-needle-deflection-ils">
          <input> ap/gs-epsilon </input>
          <gain>1.0</gain> <!---GS needle from NAV radio:-1 ... 1-->
          <clipto>
            <min> -1 </min>
            <max>  1 </max>
          </clipto>
        </pure_gain>

        <switch name="ap/gs-needle-deflection">
          <default value="0.0"/>
          <test value="ap/gs-needle-deflection-ils">
            <!--ap/pitch-selector eq 5-->
	    ap/posadk eq 1
          </test>
	</switch>
<!--****************************** Heading stabilizer **********************-->
<!--ILS approach (STU Kurs) have own pid. -->
<switch name="ap/heading-error">
          <default value="0.0"/>
          <test value="ap/heading-error-zk">
            ap/roll-selector eq 2
          </test>
          <test value="ap/heading-error-pnp">
            ap/roll-selector eq 3
	    ap/navigac == 1
          </test>
          <test value="ap/heading-error-nvu">
            ap/roll-selector eq 4
	    ap/navigac == 1
          </test>
        </switch>

        <switch name="ap/heading-error-bias-switch">
         <default value="0.0"/>
         <test value="360.0">
            ap/heading-error lt -180
         </test>
         <test value="-360.0">
            ap/heading-error gt 180
         </test>
        </switch>

        <summer name="ap/heading-deviation">
         <input> ap/heading-error-bias-switch </input>
         <input> ap/heading-error </input>
         <input> ap/vor-eps </input>
       </summer>

       <pid name="ap/heading-pid">
          <input>ap/heading-deviation</input>
          <kp> 0.035 </kp>
	  <ki> 0.0 </ki>
          <kd> 0.025 </kd>
          <output>ap/heading-cmd-norm</output>
        </pid>

      </channel>

<!-- *********************** Wing leveler  ************************ -->
    <channel name="Roll">
<!--              Roll stab mode selector
    ap/roll-selector state:
    0 - roll damper
    1 - stabilize current roll value
    2 - stabilize current heading by variate roll
    3 - VOR
    4 - NVU
    5 - ILS (STU kurs)

-->
            <switch name="ap/roll-trigger">
              <default value="-1.0"/>
              <test value="0.0">
                ap/roll-hold ne 0
              </test>
            </switch>

            <switch name="ap/input-roll-rad">
              <!--All automatic stabilizer exclude ILS use it-->
	      <default value="ap/heading-cmd-norm"/>
              <test value="0.0">
                ap/roll-selector == 0 <!--Roll damper only-->
              </test>

              <test value="ap/stab-input-roll-rad">
                ap/roll-selector == 1 <!--Roll wheel-->
              </test>

              <test value="ap/ils-out">
                ap/roll-selector == 5 <!--ILS (STU Kurs) pid-->
		ap/posadk == 1
              </test>
            </switch>

            <lag_filter name="ap/input-roll-rad-clipped">
              <input>ap/input-roll-rad</input>
              <c1>0.7</c1>
              <clipto>
                <min>-0.43</min>
                <max>0.43</max>
              </clipto>
            </lag_filter>

            <summer name="ap/roll-error">
              <input>ap/input-roll-rad-clipped</input>
              <input>-attitude/roll-rad</input>
            </summer>

            <pid name="ap/roll-hold-pid">
              <input>ap/roll-error</input>
              <kp> 5.0 </kp>
              <ki> 0.07 </ki>
              <kd> 0.0 </kd>
              <trigger>ap/roll-trigger</trigger>
              <clipto>
                <min>-1.0</min>
                <max>1.0</max>
              </clipto>
            </pid>
<!--             Autopilot or  Roll Damper only?        -->
	    <switch name="ap/roll-pid-switched">
              <default value="0.0"/>
              <test value="ap/roll-hold-pid">
                ap/roll-hold ne 0
              </test>
            </switch>

            <pid name="ap/roll-damper">
	      <input>-attitude/roll-rad</input>
              <kp> 0.0 </kp>
              <ki> 0.0 </ki>
              <kd> 1.0 </kd>
              <clipto>
                <min>-1.0</min>
                <max>1.0</max>
              </clipto>
            </pid>

            <!--Output-->
            <summer name="ap/roll-out">
 <!--<input>ap/roll-damper</input>-->
              <input>ap/roll-pid-switched</input>
              <clipto>
                <min>-1</min>
                <max>1</max>
              </clipto>
            </summer>

	    <!--Turbulence switch-->
            <scheduled_gain name="ap/roll-turb">
              <input>ap/roll-out</input>
              <table>
                <independentVar> ap/turbulence </independentVar>
                <tableData>
                  0             1.0
		  1             0.5
                </tableData>
              </table>
            </scheduled_gain>

            <pure_gain name="ap/aileron">
              <input>ap/roll-turb</input>
              <gain>1.0</gain>
              <output>fcs/absu-roll</output>
            </pure_gain>
      </channel>

<!--******************************** Yaw control *****************************-->
      <channel name="Yaw">

	<!--Yaw damper-->
        <washout_filter name="ap/yaw-wf">
          <input>velocities/r-aero-rad_sec</input>
          <c1>0.4</c1>
        </washout_filter>

        <pure_gain name="ap/yaw-damper">
          <input>ap/yaw-wf</input>
          <gain>8.0</gain><!--8-->
        </pure_gain>

        <!--Slip stabilizer-->
        <switch name="ap/beta-rad-switched">
          <default value="0.0"/>
          <test value="aero/beta-rad">
            ap/roll-hold ne 0
          </test>
        </switch>

        <pid name="ap/yaw-pid">
          <input>ap/beta-rad-switched</input>
          <kp> 1.0 </kp>
          <ki> 1.0 </ki>
          <kd> 0.0 </kd>
          <clipto>
            <min>-0.5</min>
            <max>0.5</max>
          </clipto>
        </pid>
        <!--             Autopilot or  Yaw Damper only?        -->
        <switch name="ap/yaw-pid-switched">
          <default value="0.0"/>
          <test value="ap/yaw-pid">
            ap/roll-hold ne 0
          </test>
        </switch>

        <!--Output-->
        <summer name="ap/yaw-out">
          <input>ap/yaw-damper</input>
          <!--<input>ap/yaw-suu</input>-->
          <input>-ap/yaw-pid-switched</input>
          <clipto>
            <min>-1</min>
            <max>1</max>
          </clipto>
        </summer>
     	    <!--Turbulence switch-->
        <scheduled_gain name="ap/yaw-turb">
           <input>ap/yaw-out</input>
             <table>
                <independentVar> ap/turbulence </independentVar>
                <tableData>
                  0             1.0
		  1             0.5
             </tableData>
           </table>
        </scheduled_gain>

        <pure_gain name="ap/rudder">
          <input>ap/yaw-turb</input>
          <gain>1.0</gain>
          <output>fcs/absu-yaw</output>
        </pure_gain>

      </channel>
<!-- ***************************** Reverser ******************************* -->
<channel name="Reverser">

        <switch name="fcs/rev-1-left-cmd">
          <default value="0.0"/>
          <test value="1.0">
            fcs/revers-by-key gt 0.5
          </test>
          <test value="fcs/revers-by-joy">
            fcs/throttle-cmd-norm[0] lt fcs/revers-1-limit
          </test>
        </switch>
        <switch name="fcs/rev-1-right-cmd">
          <default value="0.0"/>
          <test value="1.0">
            fcs/revers-by-key gt 0.5
          </test>
          <test value="fcs/revers-by-joy">
            fcs/throttle-cmd-norm[2] lt fcs/revers-1-limit
          </test>
        </switch>
        <switch name="fcs/rev-2-left-cmd">
          <default value="0.0"/>
          <test value="1.0">
            fcs/revers-by-key gt 0.5
          </test>
          <test value="fcs/revers-by-joy">
            fcs/throttle-cmd-norm[0] lt fcs/revers-2-limit
          </test>
        </switch>
        <switch name="fcs/rev-2-right-cmd">
          <default value="0.0"/>
          <test value="1.0">
            fcs/revers-by-key gt 0.5
          </test>
          <test value="fcs/revers-by-joy">
            fcs/throttle-cmd-norm[2] lt fcs/revers-2-limit
          </test>
        </switch>

        <kinematic name="fcs/reverser-lever-left">
          <input>fcs/rev-1-left-cmd</input>
          <traverse>
            <setting>
              <position>0</position>
              <time>0</time>
            </setting>
            <setting>
              <position>2.35</position>
              <time>2</time>
            </setting>
          </traverse>
          <output>propulsion/engine[0]/reverser-angle-rad</output>
        </kinematic>

        <kinematic name="fcs/reverser-lever-right">
          <input>fcs/rev-1-right-cmd</input>
          <traverse>
            <setting>
              <position>0</position>
              <time>0</time>
            </setting>
            <setting>
              <position>2.35</position>
              <time>2</time>
            </setting>
          </traverse>
          <output>propulsion/engine[2]/reverser-angle-rad</output>
        </kinematic>

        <kinematic name="fcs/reverser-throttle-left">
          <input>fcs/rev-2-left-cmd</input>
          <traverse>
            <setting>
              <position>0</position>
              <time>0</time>
            </setting>
            <setting>
              <position>0.6</position>
              <time>1</time>
            </setting>
          </traverse>
        </kinematic>

        <kinematic name="fcs/reverser-throttle-right">
          <input>fcs/rev-2-right-cmd</input>
          <traverse>
            <setting>
              <position>0</position>
              <time>0</time>
            </setting>
            <setting>
              <position>0.6</position>
              <time>1</time>
            </setting>
          </traverse>
        </kinematic>

</channel>
<!-- ***************************** Autothrottle ******************************* -->
      <channel name="At">

        <summer name="ap/at-error">
          <input>-ap/input-at</input>
          <input>velocities/vc-fps</input>
          <clipto>
            <min>-30</min>
            <max>30</max>
          </clipto>
        </summer>

<!--Transient compensation -->
        <summer name="ap/at-transient-error">
          <input>fcs/throttle-cmd-norm[0]</input>
          <input>-ap/at-pid-output</input>
        </summer>

        <switch name="ap/at-tr-err-switched">
          <default value="0.0"/>
          <test value="-ap/at-transient-error">
            ap/at-podg == 1
          </test>
        </switch>

        <pure_gain name="ap/at-transient-compensator">
          <input>ap/at-tr-err-switched</input>
          <gain>20.0</gain>
        </pure_gain>

        <!--End transient procedure -->
<!--Helpers-->
        <switch name="ap/at-hold">
          <default value="0.0"/>
          <test value="1">
            ap/at-hold-0 == 1
          </test>
          <test value="1">
            ap/at-hold-1 == 1
          </test>
          <test value="1">
            ap/at-hold-2 == 1
          </test>
        </switch>

        <switch name="ap/at-trigger">
          <default value="0.0"/>
          <test value="-1.0">
            ap/at-podg == 0
          </test>
          <test value="-1.0">
            ap/at-hold == 0
          </test>
          <test value="1.0">
            ap/at-error > 0.0
            ap/at-pid-output > 0.9
          </test>
          <test value="1.0">
            ap/at-error lt 0.0
            ap/at-pid-output lt 0.1
          </test>

        </switch>

        <switch name="ap/at-error-switched">
          <default value="ap/at-transient-compensator"/>
          <test value="ap/at-error">
            ap/at-hold == 1
          </test>
        </switch>

        <switch name="ap/at-pid-ki">
          <default value="0.1"/>
          <test value="0.001">
            ap/at-hold == 1
          </test>
        </switch>
        <switch name="ap/at-pid-kd">
          <default value="0.0"/>
          <test value="0.1">
            ap/at-hold == 1
          </test>
        </switch>

        <pid name="ap/at-pid">
          <input>-ap/at-error-switched</input>
          <kp> 0.04 </kp>
          <ki> ap/at-pid-ki </ki>
          <kd> ap/at-pid-kd </kd>
          <trigger>ap/at-trigger</trigger>
          <clipto>
            <min>0.0</min>
            <max>1.0</max>
          </clipto>
          <output>ap/at-pid-output</output>
        </pid>

       <switch name="ap/at-thr-switched-0">
         <default value="fcs/throttle-cmd-norm[0]"/>
         <test value="fcs/reverser-throttle-left">
           fcs/reverser-throttle-left gt 0
         </test>
          <test value="ap/at-pid">
            ap/at-hold-0 == 1
          </test>
          <output>fcs/at-throttle-cmd-norm[0]</output>
        </switch>

        <switch name="ap/at-thr-switched-1">
          <default value="fcs/throttle-cmd-norm[1]"/>
          <test value="ap/at-pid">
            ap/at-hold-1 == 1
          </test>
          <output>fcs/at-throttle-cmd-norm[1]</output>
        </switch>

        <switch name="ap/at-thr-switched-2">
          <default value="fcs/throttle-cmd-norm[2]"/>
          <test value="fcs/reverser-throttle-right">
            fcs/reverser-throttle-right gt 0
          </test>
          <test value="ap/at-pid">
            ap/at-hold-2 == 1
          </test>
          <output>fcs/at-throttle-cmd-norm[2]</output>
        </switch>

      </channel>

</autopilot>
